*Heading
** Job name: 090L_refined Model name: Model-090L_refined
** Generated by: Abaqus/CAE 2019.HF4
*Preprint, echo=NO, model=NO, history=NO, contact=NO
**
** PARTS
**
*Part, name=Part-local
*End Part
**
**
** ASSEMBLY
**
*Assembly, name=Assembly
**
*Instance, name=Part-local-1, part=Part-local
*Node
      1, 0.000500000024, 5.99999985e-05
      2, 0.000500000024, 2.99999992e-05
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*Element, type=DC2D4
 1,   1,  21, 522,  60
 2,  21,   2,  22, 522
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*Nset, nset=Set-all, generate
    1,  2600,     1
*Elset, elset=Set-all, generate
    1,  2472,     1
** Section: Section-SS316
*Solid Section, elset=Set-all, material=Material-SS316
,
*End Instance
**
*Nset, nset=Set-border, instance=Part-local-1
   1,   2,   3,   4,   5,   6
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*Elset, elset=Set-border, instance=Part-local-1
    1,    2,    3,    4,    5,    6
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*Submodel, type=NODE, exteriorTolerance=0.05
Set-border,
*End Assembly
**
** MATERIALS
**
*Material, name=Material-SS316
*Conductivity, dependencies=3
   0.2,  32.,   0.,   0.,   0.
 13.96,  27.,   1.,   0.,   0.
 35.96,1427.,   1.,   0.,   0.
135.96,1427.,   2.,   0.,   0.
140.23,2727.,   2.,   0.,   0.
    0.,  25.,   0.,   1.,   0.
    0.,  25.,   0.,   0.,   1.
*Density, dependencies=3
 7954.,  27.,   0.,   0.,   0.
 7027.,1427.,   0.,   0.,   0.
 7954.,  27.,   1.,   0.,   0.
 7027.,1427.,   1.,   0.,   0.
 7027.,1427.,   2.,   0.,   0.
 5930.,2727.,   2.,   0.,   0.
 1.225,  27.,   0.,   1.,   0.
    1.,  27.,   0.,   0.,   1.
*Latent Heat
275000.,1375.,1427.
*Specific Heat, dependencies=3
 499.07,  27.,   0.,   0.,   0.
 685.38,1427.,   0.,   0.,   0.
 499.07,  27.,   1.,   0.,   0.
 685.38,1427.,   1.,   0.,   0.
 769.86,1427.,   2.,   0.,   0.
 769.86,2727.,   2.,   0.,   0.
  1000.,  25.,   0.,   1.,   0.
    50.,  25.,   0.,   0.,   1.
    10.,  25.,   1.,   0.,   1.
     5.,  25.,   2.,   0.,   1.
*User Defined Field
**
** PREDEFINED FIELDS
**
FLAG_INITIAL_CONDITIONS
FLAG_IC_LINE2
** ----------------------------------------------------------------
**
** STEP: Step-heat
**
*Step, name=Step-heat, nlgeom=NO, inc=100000
*Heat Transfer, end=PERIOD, deltmx=200.
1e-05, 0.00025, 1e-08, 0.00025,
**
** BOUNDARY CONDITIONS
**
** Name: BC-border Type: Submodel
*Boundary, submodel, step=1
Set-border, 11, 11
*FIELD,USER,NUMBER=2
Part-local-1.Set-all,
*FILM
Part-local-1.Set-all,F1NU
**
** LOADS
**
** Name: Load-laser   Type: Body heat flux
*Dflux, op=NEW
Part-local-1.Set-all, BFNU, 1.
**
** OUTPUT REQUESTS
**
*Restart, write, frequency=0
**
** FIELD OUTPUT: F-Output-all
**
*Output, field, time interval=2.5e-05
*Node Output
NT,
*Element Output, directions=YES
FV,
*Output, history, frequency=0
*End Step
** ----------------------------------------------------------------
**
** STEP: Step-phase
**
*Step, name=Step-phase, nlgeom=NO, inc=100000
*Heat Transfer, end=PERIOD, deltmx=1e+06
1., 1., 1e-05, 1.,
**
** BOUNDARY CONDITIONS
**
** Name: BC-border Type: Submodel
*Boundary, op=NEW
**
** LOADS
**
** Name: Load-laser   Type: Body heat flux
*Dflux, op=NEW
** Name: Load-phase   Type: Body heat flux
*Dflux, op=NEW
Part-local-1.Set-all, BF, 1000000.
*Field,User,Number=3
Part-local-1.Set-all,
*FILM, op=NEW
**
** OUTPUT REQUESTS
**
*Restart, write, frequency=0
**
** FIELD OUTPUT: F-Output-all
**
*Output, field, frequency=99999
*Node Output
NT,
*Element Output, directions=YES
FV,
*Output, history, frequency=0
*End Step
